// SBML level 3 version 2

model main()
  // model units - substance: mole, time: second, extent: mole

  // Compartments:
  compartment c = 1 litre;

  // Species:
  species EGOGAP in c = 0;
  species cAMP in c = 0;
  species Sch9 in c = 0;
  species Gcn2 in c = 1/c;
  species Gcn4 in c = 1/c;
  species Glutamine in c = 0.001/c;
  species Snf1 in c = 1/c;
  species PKA in c = 0;
  species eIF in c = 0;
  species Gln3 in c = 1/c;
  species Gln1 in c = 0;
  species Rtg13 in c = 1/c;
  species Gis1 in c = 1/c;
  species Mig1 in c = 1/c;
  species Cyr1 in c = 0;
  species PDE in c = 0;
  species Sak in c = 1/c;
  species Dot6 in c = 1/c;
  species TORC1 in c = 0;
  species Tps1 in c = 1/c;
  species Trehalase in c = 0;
  species Ras in c = 0;
  species EGO in c = 0;
  species Protein in c = 0.1/c;
  species Rib in c = 0;

  // Parameters:
  w_rtg = 0.1864123;
  w_sak = 0.2051402;
  w_pka_camp = 102.1098;
  w_mig_snf = 1.214794;
  k_acc_glu = 0.04923113;
  w_sch9_torc = 1.96219;
  k_mRNA_degr = 0.0730004;
  w_torc_egoin = 0.3026036;
  k_acc_pro = 0.0002146415;
  sigma_gcn2 = 20;
  w_sch9 = 0.5653482;
  w_eif_gcn2 = 0.2755141;
  w_gln1_gln3 = 0.5198021;
  w_snf_sak = 1.518319;
  w_tps_pka = 0.5739157;
  w_pka = 0.05808607;
  gamma_gcn2 = 4.710287;
  sigma_gis1 = 10;
  w_dot = 0.2929693;
  w_tre = 1.067481;
  w_torc = 0.5389034;
  w_pka_sch9 = 17.49712;
  gammatre = 0.3417462;
  w_gis = 1.303889;
  sigma_gln1 = 1;
  sigma_tps = 5;
  sigma_dot = 20;
  sigma_eif = 1;
  w_gln_snf = 3.904457;
  w_torc_glut = 0.8632318;
  w_ego = 0.2844754;
  sigma_ras = 1;
  sigma_tor = 5;
  w_mig = 10.6446;
  gammacyr = 8.955508;
  gammagap = 0.5621458;
  sigma_rtg = 10;
  gammasnf = 0.8196165;
  Cyr1_T = 1;
  k_camp_deg = 0.08380637;
  sigma_mig1 = 0.27;
  gammasch9 = 4.633145;
  w_snf_glc = 1.150016;
  w_gcn4_gcn2_trna = 1.531571;
  Gln1_T = 1;
  sigma_ego = 5;
  w_mig_pka = 2.305552;
  Gcn2_T = 1;
  gammatps = 0.4713471;
  k_pr = 0.02016937;
  tRNA_total = 2.474511;
  w_tps = 0.05299494;
  w_tre_pka = 3.072325;
  gammator = 7.548433;
  w_gcn4 = 0.7428199;
  gammapka = 2.675883;
  w_rtg_torc = 0.8768161;
  sigma_gln = 10;
  Sak_T = 1;
  w_ego_basal = 0.01099267;
  w_gln3 = 0.639194;
  k_acc_nh4 = 0.001469327;
  PKA_T = 1;
  k_camp_cyr = 10.86559;
  gammagln3 = 0.08092181;
  w_torc_snf = 0.4373402;
  gammaeif = 0.4710288;
  Trehalase_T = 1;
  ATP = 0.5;
  gammapde = 0.2818114;
  k_degr = 0.08982537;
  Rtg13_T = 1;
  Ras_T = 1;
  tRNA_sensitivity = 74.50746;
  w_gln_sit = 0.8613436;
  w_cyr_glu = 5.129256;
  w_pde_pka = 2.892301;
  Carbon = 0.5;
  Gcn4_T = 1;
  k_camp_pde = 14.11624;
  gammaras = 1.822284;
  sigma_snf = 3;
  w_snf = 0.5376718;
  sigma_gap = 1;
  w_gap_torc = 88.32638;
  Gln3_T = 1;
  eIF_T = 1;
  w_cyr_snf = 0.1191307;
  w_dot_sch_pka = 0.1629698;
  k_transcription = 0.2359508;
  Dot6_T = 1;
  Glutamine_ext = 0;
  PDE_T = 1;
  w_sak_pka = 0.3751548;
  gammaego = 50.65518;
  sigma_cyr = 3.5;
  w_gcn_torc = 1.294437;
  gamma_mig = 0.6558578;
  Mig1_T = 1;
  sigma_sch9 = 8;
  w_ras_glu = 0.2067134;
  Tps1_T = 1;
  Proline = 0;
  TORC1_T = 1;
  w_ras = 0.02078138;
  w_cyr = 1.351414;
  w_ras_pka = 1.872302;
  sigma_trehalase = 10;
  sigma_gcn4 = 5;
  w_gis_pka = 3.301317;
  w_gcn = 0.115475;
  w_gap_N = 7.757319;
  Gis1_T = 1;
  sigma_pde = 1.9;
  w_ego_gap = 2.20799;
  NH4 = 0;
  gammagln1 = 0.06351151;
  w_gln1 = 0.2223228;
  Snf1_T = 1;
  w_pde = 0.382693;
  EGO_T = 1;
  w_eif = 3.72844;
  sigma_pka = 1;
  sigma_sak = 20;
  Sch9_T = 1;
  EGOGAP_T = 1;
  w_torc_ego = 0.8774738;
  w_gis_sch = 0.8421956;

  // Reactions:
  EGOGAP_r: => EGOGAP; gammagap*(EGOGAP_T*(1/(1 + exp(-sigma_gap*(w_gap_N*(1 - Glutamine) - w_gap_torc*TORC1)))) - EGOGAP);  // modifiers: Glutamine, TORC1, EGO
  cAMP_r: => cAMP; k_camp_cyr*Cyr1*ATP - k_camp_pde*PDE*cAMP - k_camp_deg*cAMP;  // modifiers: Cyr1, PDE
  Sch9_r: => Sch9; gammasch9*(Sch9_T*(1/(1 + exp(-sigma_sch9*(w_sch9_torc*TORC1 - w_sch9)))) - Sch9);  // modifiers: TORC1
  Gcn2_r: => Gcn2; gamma_gcn2*(Gcn2_T*(1/(1 + exp(-sigma_gcn2*(w_gcn - w_gcn_torc*Sch9)))) - Gcn2);  // modifiers: Sch9
  Gcn4_r: => Gcn4; Gcn4_T*(1/(1 + exp(-sigma_gcn4*(w_gcn4_gcn2_trna*min(Gcn2, tRNA_sensitivity*(tRNA_total - min(tRNA_total, Glutamine))) - w_gcn4)))) - Gcn4;  // modifiers: Gcn2, Glutamine
  Glutamine_r: => Glutamine; k_acc_glu*Glutamine_ext + k_acc_pro*Proline + k_acc_nh4*NH4*Gln1*Carbon - k_degr*Glutamine;  // modifiers: Gln1
  Snf1_r: => Snf1; gammasnf*(Snf1_T*(1/(1 + exp(-sigma_snf*(-w_snf_glc*Carbon + w_snf_sak*Sak - w_snf)))) - Snf1);  // modifiers: Sak
  PKA_r: => PKA; gammapka*(PKA_T*(1/(1 + exp(-sigma_pka*(w_pka_camp*cAMP - w_pka - w_pka_sch9*Sch9)))) - PKA);  // modifiers: cAMP, Sch9
  eIF_r: => eIF; gammaeif*(eIF_T*(1/(1 + exp(-sigma_eif*(w_eif - w_eif_gcn2*Gcn2)))) - eIF);  // modifiers: Gcn2
  Gln3_r: => Gln3; gammagln3*(Gln3_T*(1/(1 + exp(-sigma_gln*(-w_gln3 + w_gln_snf*Snf1 + w_gln_sit*(1 - TORC1))))) - Gln3);  // modifiers: Snf1, TORC1
  Gln1_r: => Gln1; gammagln1*(Gln1_T*(1/(1 + exp(-sigma_gln1*(w_gln1_gln3*Gln3 - w_gln1)))) - Gln1);  // modifiers: Gln3
  Rtg13_r: => Rtg13; Rtg13_T*(1/(1 + exp(-sigma_rtg*(-w_rtg_torc*TORC1 + w_rtg)))) - Rtg13;  // modifiers: TORC1
  Gis1_r: => Gis1; Gis1_T*(1/(1 + exp(-sigma_gis1*(-w_gis_pka*PKA - w_gis_sch*Sch9 + w_gis)))) - Gis1;  // modifiers: Sch9, PKA
  Mig1_r: => Mig1; gamma_mig*(Mig1_T*(1/(1 + exp(-sigma_mig1*(w_mig_pka*PKA - w_mig_snf*Snf1 + w_mig)))) - Mig1);  // modifiers: Snf1, PKA
  Cyr1_r: => Cyr1; gammacyr*(Cyr1_T*(1/(1 + exp(-sigma_cyr*(w_cyr_glu*Carbon*Ras - w_cyr - w_cyr_snf*Snf1)))) - Cyr1);  // modifiers: Snf1, Ras
  PDE_r: => PDE; gammapde*(PDE_T*(1/(1 + exp(-sigma_pde*(w_pde_pka*PKA - w_pde)))) - PDE);  // modifiers: PKA
  Sak_r: => Sak; Sak_T*(1/(1 + exp(-sigma_sak*(w_sak - w_sak_pka*PKA)))) - Sak;  // modifiers: PKA
  Dot6_r: => Dot6; Dot6_T*(1/(1 + exp(-sigma_dot*(-w_dot_sch_pka*Sch9*PKA + w_dot)))) - Dot6;  // modifiers: Sch9, PKA
  TORC1_r: => TORC1; gammator*(TORC1_T*(1/(1 + exp(-sigma_tor*(w_torc_glut*Glutamine + w_torc_ego*EGO - w_torc_egoin*(1 - EGO) - w_torc - w_torc_snf*Snf1)))) - TORC1);  // modifiers: Glutamine, Snf1, EGO
  Tps1_r: => Tps1; gammatps*(Tps1_T*(1/(1 + exp(-sigma_tps*(w_tps_pka*(PKA_T - PKA) - w_tps)))) - Tps1);  // modifiers: PKA
  Trehalase_r: => Trehalase; gammatre*(Trehalase_T*(1/(1 + exp(-sigma_trehalase*(w_tre_pka*PKA - w_tre)))) - Trehalase);  // modifiers: PKA
  Ras_r: => Ras; gammaras*(Ras_T*(1/(1 + exp(-sigma_ras*(-w_ras_pka*PKA + w_ras_glu*Carbon + w_ras)))) - Ras);  // modifiers: PKA
  EGO_r: => EGO; gammaego*(EGO_T*(1/(1 + exp(-sigma_ego*(w_ego_gap*EGOGAP*(Glutamine_ext + 0.5*NH4 + 0.01*Proline) - w_ego*(1 - Glutamine) - w_ego_basal)))) - EGO);  // modifiers: EGOGAP, Glutamine
  Protein_r: => Protein; k_pr*ATP*min(min(Rib, eIF), min(tRNA_total, Glutamine))*Protein;  // modifiers: Glutamine, eIF, Rib
  Rib_r: => Rib; k_transcription*(1 - Dot6) - k_mRNA_degr*Rib;  // modifiers: Dot6
end
