// SBML level 2 version 1

model Everything()
  // A model of the cAMP pathway which attempts to include absolutely everything.

  // Compartments:
  compartment compartment = 1;

  // Species:
  species $Rgs2 in compartment = 1e-5;
  species $Cyr1 in compartment = 1e-5;
  species $Pde2 in compartment = 0.00016;
  species $Ira in compartment = 1.1e-5;
  species $Mih1 in compartment = 1e-5;
  species $PPA in compartment = 0.000224;
  species $Sdc25 in compartment = 1e-5;
  species Gpr1 in compartment = 1e-5;
  species Glucout in compartment = 8.44618e-32;
  species Gpr1Glucout in compartment = -2.393014e-33;
  species Gpa2i in compartment = 0.0001126;
  species Gpa2a in compartment = -4.997218e-33;
  species Krh in compartment = 0.0001;
  species Gpa2aKrh in compartment = -1.546889e-32;
  species Ras2i in compartment = 0.0004372062;
  species Ras2a in compartment = 4.539384e-5;
  species Cdc25 in compartment = 1.221508e-5;
  species Cdc25P in compartment = 5.784917e-6;
  species cAMP in compartment = 0.0008259176;
  species Pde1 in compartment = 3.343141e-5;
  species PKAi in compartment = 7.651484e-5;
  species C in compartment = 2.047032e-5;
  species Glucin in compartment = 4.710368e-32;
  species Pde1P in compartment = 1.068588e-6;

  // Parameters:
  Gpr1Glucass_k_1 = 0.003016595;
  Gpr1Glucdiss_k_2 = 0.1428439;
  Gpa2act_kA_3 = 57682.62;
  Gpa2deact_kA_4 = 12989.44;
  Gpa2deact_k1_4 = 0.8990037;
  Gpa2Krhass_k_5 = 391089.6;
  Gpa2Krhdiss_k_6 = 6.122101;
  Ras2act_kcat_7 = 0.7406041;
  Ras2act_Km_7 = 0.00138648;
  Ras2act_Kd_7 = 0.04408336;
  Ras2act_a_7 = 32.90319;
  Ras2act_b_7 = 63.75015;
  Ras2deact_kA_8 = 519.8115;
  Ras2deact_k1_8 = 0.04205938;
  Cdc25phos_kcat_9 = 0.1854773;
  Cdc25phos_Km_9 = 0.005167363;
  Cdc25dephos_kcat_10 = 2.516362;
  Cdc25dephos_Km_10 = 0.01625168;
  cAMPsynth_kcatGpa2_11 = 2933.872;
  cAMPsynth_kcatRas2_11 = 650;
  cAMPsynth_Km_11 = 0.004;
  cAMPhydroPde2_kcat_12 = 1;
  cAMPhydroPde2_Km_12 = 0.002;
  cAMPhydroPde1p_kcat_13 = 25.25399;
  cAMPhydroPde1p_Km_13 = 6.087414e-7;
  cAMPhydroPde1_kcat_14 = 1.112835;
  cAMPhydroPde1_Km_14 = 0.845082;
  Pde1phos_kcat_15 = 6.822137;
  Pde1phos_Km_15 = 0.008648117;
  Pde1dephos_kcat_16 = 2.416961;
  Pde1dephos_Km_16 = 0.001074716;
  PKAact_kF_17 = 7.61676e8;
  PKAact_kI_17 = 100;
  PKAdeact_kF_18 = 19.93698;
  PKAdeact_kA_18 = 22139.05;
  GlucTrans_V_19 = 0.062;
  GlucTrans_Km_19 = 1.7;
  GlucTrans_Ki_19 = 0.91;
  GlucUtil_k_20 = 0.03;

  // Assignment rules:
  percentFreeC := C/(C + 2*PKAi)*100;
  percentActiveGpa2 := (Gpa2a + Gpa2aKrh)/(Gpa2a + Gpa2aKrh + Gpa2i)*100;

  // Rate rules:
  Rgs2' = 0;
  Cyr1' = 0;
  Pde2' = 0;
  Ira' = 0;
  Mih1' = 0;
  PPA' = 0;
  Sdc25' = 0;

  // Reactions:
  Gpr1Glucass: Gpr1 + Glucout => Gpr1Glucout; Gpr1Glucass_k_1*Gpr1*Glucout;
  Gpr1Glucdiss: Gpr1Glucout => Gpr1 + Glucout; Gpr1Glucdiss_k_2*Gpr1Glucout;
  Gpa2act: Gpa2i => Gpa2a; Gpa2act_kA_3*Gpr1Glucout*Gpa2i;  // modifiers: Gpr1Glucout
  Gpa2deact: Gpa2a => Gpa2i; (Gpa2deact_kA_4*Rgs2 + Gpa2deact_k1_4)*Gpa2a;  // modifiers: Rgs2
  Gpa2Krhass: Gpa2a + Krh => Gpa2aKrh; Gpa2Krhass_k_5*Gpa2a*Krh;
  Gpa2Krhdiss: Gpa2aKrh => Gpa2a + Krh; Gpa2Krhdiss_k_6*Gpa2aKrh;
  Ras2act: Ras2i => Ras2a; Ras2act_kcat_7*Cdc25*Ras2i/Ras2act_Km_7*(1 + Ras2act_b_7*Glucin/(Ras2act_Kd_7*Ras2act_a_7))/(1 + Glucin/Ras2act_Kd_7 + Ras2i/Ras2act_Km_7*(1 + Glucin/(Ras2act_Kd_7*Ras2act_a_7)));  // modifiers: Cdc25, Glucin
  Ras2deact: Ras2a => Ras2i; (Ras2deact_kA_8*Ira + Ras2deact_k1_8)*Ras2a;  // modifiers: Ira
  Cdc25phos: Cdc25 => Cdc25P; C*Cdc25*Cdc25phos_kcat_9/(Cdc25phos_Km_9 + Cdc25);  // modifiers: C
  Cdc25dephos: Cdc25P => Cdc25; Mih1*Cdc25P*Cdc25dephos_kcat_10/(Cdc25dephos_Km_10 + Cdc25P);  // modifiers: Mih1
  cAMPsynth: => cAMP; Cyr1*(cAMPsynth_kcatGpa2_11*Gpa2a + cAMPsynth_kcatRas2_11*Ras2a)/cAMPsynth_Km_11;  // modifiers: Gpa2a, Ras2a, Cyr1
  cAMPhydroPde2: cAMP => ; Pde2*cAMP*cAMPhydroPde2_kcat_12/(cAMPhydroPde2_Km_12 + cAMP);  // modifiers: Pde2
  cAMPhydroPde1p: cAMP => ; Pde1P*cAMP*cAMPhydroPde1p_kcat_13/(cAMPhydroPde1p_Km_13 + cAMP);  // modifiers: Pde1P
  cAMPhydroPde1: cAMP => ; Pde1*cAMP*cAMPhydroPde1_kcat_14/(cAMPhydroPde1_Km_14 + cAMP);  // modifiers: Pde1
  Pde1phos: Pde1 => Pde1P; C*Pde1*Pde1phos_kcat_15/(Pde1phos_Km_15 + Pde1);  // modifiers: C
  Pde1dephos: Pde1P => Pde1; PPA*Pde1P*Pde1dephos_kcat_16/(Pde1dephos_Km_16 + Pde1P);  // modifiers: PPA
  PKAact: PKAi => 2 C; PKAi*cAMP^4*PKAact_kF_17/(1 + PKAact_kI_17*Krh);  // modifiers: Krh, cAMP
  PKAdeact: 2 C => PKAi; PKAdeact_kF_18*C^2*(1 + PKAdeact_kA_18*Krh);  // modifiers: Krh
  GlucTrans: Glucout -> Glucin; GlucTrans_V_19*(Glucout/GlucTrans_Km_19 - Glucin/GlucTrans_Km_19)/(1 + Glucout/GlucTrans_Km_19 + Glucin/GlucTrans_Km_19 + GlucTrans_Ki_19*Glucout*Glucin/GlucTrans_Km_19^2);
  GlucUtil: Glucin => ; GlucUtil_k_20*Glucin;
end
